// COMSOL Multiphysics 6.4.0.293 model "Comsol_Project_Backup.mph"
// Outline of the model tree

Parameters
  t_tgan = 3[nm]  // top GaN thickness
  t_algan = 20[nm]  // AlGaN thickness
  t_bgan = 1.3[um]  // Bottom GaN thickness
  tair = 50[nm]  // Air thickness
  w_bottom = 13[um]  // Bottom GaN and air widths
  w_top = 3[um]  // AlGaN and top GaN thicknesses
  wavelength = 300[nm]  // Free-space Wavelength
  a_AlGaN = 4.98  // Sellmeier coefficient a
  b_AlGaN = 0.39  // Sellmeier coefficient b
  c_AlGaN = 297.7[nm]  // Sellmeier coefficient c

Functions
  int1: Interpolation "n_GaN"
    funcnametable = {int1, 1}
    filetype = excel
    funcname = n_GaN
    table = 
      {300.508253386, 2.57484275261}
      {304.8284604834112, 2.5742138422}
      {308.8945302244517, 2.5742138422}
      {312.9606106291947, 2.57358491861}
      {317.280807063, 2.57358491861}
      {321.601014160757, 2.57358491861}
      {325.9212212583894, 2.57358491861}
      {329.987290999, 2.57295598181}
      {334.0533820678753, 2.57295598181}
      {338.3735678381028, 2.57044026103}
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    filecolumns = 2
    columnKeys = {col1, col2}
    columnType = {col1, arg, col2, value}
    funcnames = {col1, int1, col2, n_GaN}
    fununit = 1
    argunit = nm
    plotfuncname = n_GaN
  int2: Interpolation "k_GaN"
    funcnametable = {int2, 1}
    filetype = excel
    funcname = k_GaN
    table = 
      {303.318015121, 0.396343642152}
      {306.2324813795977, 0.390713956037}
      {309.3711445864767, 0.383833222002}
      {312.285620252, 0.376952474843}
      {315.648471, 0.370697254925}
      {318.7871342071138, 0.363191019896}
      {321.925797414, 0.356310246489}
      {324.616076131, 0.34880401146}
      {327.5305423892582, 0.341297763308}
      {329.9966335650358, 0.333791515155}
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    filecolumns = 2
    columnKeys = {col1, col2}
    columnType = {col1, arg, col2, value}
    funcnames = {col1, int2, col2, k_GaN}
    fununit = 1
    argunit = nm
    plotfuncname = k_GaN
  int3: Interpolation "n_AlGaN19"
    funcnametable = {int3, 1}
    filetype = excel
    funcname = n_AlGaN19
    table = 
      {300, 2.500411546}
      {301.2562773142871, 2.51584364123}
      {302.7638185259364, 2.53127573646}
      {304.271359738, 2.54773660495}
      {306.0301648465972, 2.56213992693}
      {307.5376849719845, 2.57757202217}
      {309.0452261836338, 2.59197532257}
      {310.80402075, 2.6074074178}
      {312.311572504, 2.62283951303}
      {313.81909263, 2.63827160827}
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    filecolumns = 2
    columnKeys = {col1, col2}
    columnType = {col1, arg, col2, value}
    funcnames = {col1, int3, col2, n_AlGaN19}
    fununit = 1
    argunit = nm
    plotfuncname = n_AlGaN19
  int4: Interpolation "k_AlGaN19"
    funcnametable = {int4, 1}
    filetype = excel
    funcname = k_AlGaN19
    table = 
      {300, 0.6}
      {301.4981311864325, 0.597669893206}
      {303.49563245, 0.593009691841}
      {305.2434486751925, 0.588349502697}
      {307.7403200161518, 0.583689313554}
      {309.9875272731216, 0.580194159474}
      {312.234703098, 0.577864064902}
      {314.2322148391451, 0.57553397033}
      {316.72908618, 0.574368935266}
      {318.726608398, 0.573203875759}
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    filecolumns = 2
    columnKeys = {col1, col2}
    columnType = {col1, arg, col2, value}
    funcnames = {col1, int4, col2, k_AlGaN19}
    fununit = 1
    argunit = nm
    plotfuncname = k_AlGaN19

Geometry
  geom1 "Geometry 1" (2D, length unit m)
    r1: Rectangle "Bottom Air" | size = {w_bottom, tair}; pos = {0, -tair}
    r2: Rectangle "Bottom GaN" | size = {w_bottom, t_bgan}
    r3: Rectangle "Top AlGaN1" | size = {w_top, t_algan}; pos = {2[um], t_bgan}
    r4: Rectangle "Top AlGaN2" | size = {w_top, t_algan}; pos = {8[um], t_bgan}
    r5: Rectangle "Top GaN1" | size = {w_top, t_tgan}; pos = {2[um], t_bgan+t_algan}
    r6: Rectangle "Top GaN2" | size = {w_top, t_tgan}; pos = {8[um], t_bgan+t_algan}
    r7: Rectangle "Top Air" | size = {w_bottom, tair}; pos = {0, t_bgan}
    dif1: Difference | input = r7; input2 = r3, r4, r5, r6; keepsubtract = on
    fin: Finalize "Form Union"

Materials
  mat1: Common "Air" on domains 1, 3
    RefractiveIndex: RefractiveIndex
      n = 1
      ki = 0
  mat2: Common "GaN" on domains 2, 5, 7
    RefractiveIndex: RefractiveIndex
      n = n_GaN(wavelength)
      ki = k_GaN(wavelength)
  mat3: Common "AlGaN" on domains 4, 6
    RefractiveIndex: RefractiveIndex
      n = if(wavelength<=322[nm],n_AlGaN19(wavelength),sqrt(a_AlGaN+b_AlGaN*wavelength^2/(wavelength^2-c_AlGaN^2)))
      ki = k_AlGaN19(wavelength)

Physics
  ewfd: ElectromagneticWavesFrequencyDomain on all domains
    dependent variable E = {Ex, Ey, Ez}
    components.components = outofplane
    wee1: WaveEquationElectric (default)
    pec1: PerfectElectricConductor (default)
    init1: init "Initial Values 1" (default)
    port1: Port on boundaries 7 | Eampl = {0, 0, 1}; PortType = Periodic
    port2: Port on boundaries 2 | Eampl = {0, 0, 1}; PortType = Periodic
    pmc1: PerfectMagneticConductor on boundaries 1, 3, 5, 24-26

Mesh
  mesh1 "Mesh 1"
    size: MeshSizeDefault | hmax = 8.71E-7; hmin = 3.9E-9; hcurve = 0.3; hgrad = 1.3
    ftri1: FreeTri "Free Triangular 1" on remaining entities
      size1: Size on domains 1, 3 | hmax = 40[nm]; custom = on
      size2: Size on domains 5, 7 | hmax = 1[nm]; custom = on
      size3: Size on domains 4, 6 | hmax = 4[nm]; custom = on
      size4: Size on domains 2 | hmax = 20[nm]; custom = on

Studies
  std1 "Study 1"
    param: Parametric "Parametric Sweep" | pname = wavelength; plistarr = range(300,10,500); punit = nm
    freq: Frequency "Frequency Domain" | punit = THz; plist = c_const/wavelength; ftplistmethod = manual